*Heading
** Job name: Job-1 Model name: Model-1
** Generated by: Abaqus/CAE Learning Edition 2023
*Preprint, echo=NO, model=NO, history=NO, contact=NO
**
** PARTS
**
*Part, name=Part-1
*End Part
**
**
** ASSEMBLY
**
*Assembly, name=Assembly
**
*Instance, name=Part-1-1, part=Part-1
*Node
      1,         100.,          25.
      2,          95.,          25.
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*Element, type=CPE4
  1,   1,   2,  43,  42
  2,   2,   3,  44,  43
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*Nset, nset=Set-1, generate
   1,  451,    1
*Elset, elset=Set-1, generate
   1,  400,    1
** Section: Section-1
*Solid Section, elset=Set-1, material=Steel
5.,
*End Instance
**
*Nset, nset=RF_SET, instance=Part-1-1, generate
   1,  411,   41
*Nset, nset=Set-1, instance=Part-1-1, generate
  41,  451,   41
*Elset, elset=Set-1, instance=Part-1-1, generate
  40,  400,   40
*Nset, nset=Set-2, instance=Part-1-1, generate
 411,  451,    1
*Elset, elset=Set-2, instance=Part-1-1, generate
 361,  400,    1
*Nset, nset=Set-3, instance=Part-1-1, generate
   1,  411,   41
*Elset, elset=Set-3, instance=Part-1-1, generate
   1,  361,   40
*End Assembly
**
** MATERIALS
**
*Material, name=Steel
*Elastic
<Young>e+3, 0.3
*Plastic
<S1>,   0.
<S2>, 0.25
** ----------------------------------------------------------------
**
** STEP: Step-1
**
*Step, name=Step-1, nlgeom=YES
*Static, direct
0.02, 2.,
**
** BOUNDARY CONDITIONS
**
** Name: BC-1 Type: Displacement/Rotation
*Boundary
Set-1, 1, 1
** Name: BC-2 Type: Displacement/Rotation
*Boundary
Set-2, 2, 2
** Name: BC-3 Type: Displacement/Rotation
*Boundary
Set-3, 1, 1, 2.
**
** OUTPUT REQUESTS
**
*Restart, write, frequency=0
**
** FIELD OUTPUT: F-Output-1
**
*Output, field, variable=PRESELECT
**
** HISTORY OUTPUT: H-Output-1
**
*Output, history, variable=PRESELECT
*End Step
